*HEADING
Barrette Pile Analysis - Linear Elastic
Recreated from hands-on-example
*NODE,NSET=Nall
1,0.000000,0.000000,-30.000000
2,1.000000,0.000000,-30.000000
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*NSET,NSET=Nbottom
1,
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*NSET,NSET=Ntop
8821,
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*NSET,NSET=Nbarrette_top
9040,
9041,
9042
*NSET,NSET=Nleft
1,
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*NSET,NSET=Nright
21,
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*NSET,NSET=Nfront
1,
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*NSET,NSET=Nback
421,
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*ELEMENT,TYPE=C3D8,ELSET=EBARRETTE
5389,5931,5932,5953,5952,6372,6373,6394,6393
5390,5932,5933,5954,5953,6373,6374,6395,6394
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*ELEMENT,TYPE=C3D8,ELSET=ESOIL
1,1,2,23,22,442,443,464,463
2,2,3,24,23,443,444,465,464
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*MATERIAL,NAME=CONCRETE
*ELASTIC
30000000.0,0.15
*DENSITY
24.0
*MATERIAL,NAME=SOIL
*ELASTIC
10000,0.3
*DENSITY
18.0
*SOLID SECTION,ELSET=EBARRETTE,MATERIAL=CONCRETE
*SOLID SECTION,ELSET=ESOIL,MATERIAL=SOIL
*SURFACE,TYPE=ELEMENT,NAME=Sbarrette_top
7789,S6
7790,S6
7791,S6
7792,S6
7809,S6
7810,S6
7811,S6
7812,S6
*BOUNDARY
Nbottom,1,3
Nleft,1,1
Nright,1,1
Nfront,2,2
Nback,2,2
*STEP,NAME=LOAD_100kN
*STATIC
*DLOAD
Sbarrette_top,P,22.22222222222222
*NODE FILE
U
*EL FILE
S,E
*END STEP
*STEP,NAME=LOAD_200kN
*STATIC
*DLOAD
Sbarrette_top,P,44.44444444444444
*NODE FILE
U
*EL FILE
S,E
*END STEP
*STEP,NAME=LOAD_500kN
*STATIC
*DLOAD
Sbarrette_top,P,111.11111111111111
*NODE FILE
U
*EL FILE
S,E
*END STEP
*STEP,NAME=LOAD_1000kN
*STATIC
*DLOAD
Sbarrette_top,P,222.22222222222223
*NODE FILE
U
*EL FILE
S,E
*END STEP
*STEP,NAME=LOAD_2000kN
*STATIC
*DLOAD
Sbarrette_top,P,444.44444444444446
*NODE FILE
U
*EL FILE
S,E
*END STEP
*STEP,NAME=LOAD_3000kN
*STATIC
*DLOAD
Sbarrette_top,P,666.6666666666666
*NODE FILE
U
*EL FILE
S,E
*END STEP
*STEP,NAME=LOAD_4000kN
*STATIC
*DLOAD
Sbarrette_top,P,888.8888888888889
*NODE FILE
U
*EL FILE
S,E
*END STEP
*STEP,NAME=LOAD_5000kN
*STATIC
*DLOAD
Sbarrette_top,P,1111.111111111111
*NODE FILE
U
*EL FILE
S,E
*END STEP
*STEP,NAME=LOAD_6000kN
*STATIC
*DLOAD
Sbarrette_top,P,1333.3333333333333
*NODE FILE
U
*EL FILE
S,E
*END STEP
*STEP,NAME=LOAD_7000kN
*STATIC
*DLOAD
Sbarrette_top,P,1555.5555555555557
*NODE FILE
U
*EL FILE
S,E
*END STEP
*STEP,NAME=LOAD_8000kN
*STATIC
*DLOAD
Sbarrette_top,P,1777.7777777777778
*NODE FILE
U
*EL FILE
S,E
*EL PRINT,ELSET=EBARRETTE
S,E
*EL PRINT,ELSET=ESOIL
S,E
*END STEP
